FINISH
/CLEAR,NOSTART
/PREP7
/TITLE, Análise de Estacas e Casca
!Unidades em N e m

! Definir o tipo de elemento (BEAM188) e suas propriedades
ET, 1, BEAM188

! Propriedades do material
MP, EX, 1, 0.85*5600*SQRT(40)*1e+6 ! Módulo de elasticidade em Pa (N/m²) - 30104.88332 MPa
MP, PRXY, 1, 0.2 ! Coeficiente de Poisson
MP, DENS, 1, 2500 ! Densidade em kg/m³ (ajuste conforme necessário)

! Propriedades da seção da viga em centímetros
SECTYPE, 1, BEAM, CSOLID
SECOFFSET, CENT
SECDATA, 0.5

! Definir os pontos iniciais e finais das estacas
*SET, x_iniciais, 0.5, 2.0, 4.0, 5.5, 0.5, 5.5, 0.5, 2.0, 4.0, 5.5
*SET, y_iniciais, 2.5, 2.5, 2.5, 2.5, 0.0, 0.0, -2.5, -2.5, -2.5, -2.5
*SET, z_iniciais, 0.0, 0.0, 0.0, 0.0, 0.0, 0.0, 0.0, 0.0, 0.0, 0.0

*SET, x_finais, 0.5, 2.0, 4.0, 5.5, 0.5, 5.5, 0.5, 2.0, 4.0, 5.5
*SET, y_finais, 2.5, 2.5, 2.5, 2.5, 0.0, 0.0, -2.5, -2.5, -2.5, -2.5
*SET, z_finais, -20.0, -20.0, -20.0, -20.0, -20.0, -20.0, -20.0, -20.0, -20.0, -20.0

! Número de nós intermediários a serem criados
num_intermediate_nodes = 39 !Tentar reduzir aqui

! Inicialização do node_id
node_id = 1

! Início do loop para adicionar nós
*DO, i, 1, 10, 1  ! Ajuste para 10 iterações, conforme definido nos pontos
    ! Definição dos pontos iniciais e finais para esta iteração
    x_inicial = x_iniciais(i)
    y_inicial = y_iniciais(i)
    z_inicial = z_iniciais(i)

    x_final = x_finais(i)
    y_final = y_finais(i)
    z_final = z_finais(i)

    ! Adicionar o nó inicial
    N, node_id, x_inicial, y_inicial, z_inicial

    ! Adicionar o nó final
    node_id_final = node_id + num_intermediate_nodes + 1
    N, node_id_final, x_final, y_final, z_final
    !Travar os nós finais
    D,node_id_final,ALL,0

    ! Preencher nós intermediários
    FILL, node_id, node_id_final, num_intermediate_nodes

    ! Atualizar o node_id para a próxima iteração
    node_id = node_id_final + 1
*ENDDO


n_elemento = 1
!Geração de elementos
*DO, i, 1, 10, 1
    *DO, j, 1, num_intermediate_nodes+1, 1
        N_1 = j + (num_intermediate_nodes+2)*(i-1)
        N_2 = N_1 + 1
        EN, n_elemento, N_1, N_2
        n_elemento = n_elemento + 1
    *ENDDO
*ENDDO

! Selecionar elementos do tipo BEAM188
ESEL, S, TYPE, , 1  ! Seleciona elementos do tipo 1 (BEAM188)

! Obter a contagem dos elementos selecionados e armazenar em uma variável
*GET, num_elem, ELEM, 0, COUNT  ! Armazena a contagem em 'num_elem'

! Atribuir o valor de 'num_elem' a uma nova variável, por exemplo, 'k'
k = num_elem

! Agora você pode usar 'k' como quiser
/COM, O valor de 'k' é: k

!Criar elemento de aplicação de carga
N, 1000, 3, 0,0
N, 1001, 3, 0,0.1
EN, k+1, 1000, 1001


! Definição do tipo de elemento (SHELL181) e propriedades do material para a casca
ET, 2, SHELL181
KEYOPT, 2, 8, 2 ! Sugerido para materiais elastoplásticos
KEYOPT, 2, 3, 2 ! Sugerido para maior precisão das tensões de membrana

! Propriedades do material para SHELL181
MP, EX, 2, 0.85*5600*SQRT(20)*1e+6 ! Módulo de elasticidade Pa (N/m²) - 21287.36714 MPa
MP, PRXY, 2, 0.2 ! Coeficiente de Poisson
MP, DENS, 2, 2500 ! Densidade em kg/m³ (ajuste conforme necessário)

! Definição da seção de casca
SECTYPE, 2, SHELL
SECDATA, 1.5

! Criação do retângulo e malha da casca
RECTNG, 0, 6, -3, 3 ! Cria um retângulo
ESIZE, 0.1 ! A densidade de elementos
AMESH, ALL

! Selecionar elementos cujos centros estão dentro da faixa de Z
ESEL, S, TYPE,,2

! Modificar a seção dos elementos selecionados
EMODIF, ALL, SECNUM, 2

! Merge pontos
NSEL, S, LOC, Z, 0, 1e5
NUMMRG, NODE, 1e-5
NSEL, ALL

! Saída dos nós e elementos
ALLSEL,ALL ! Seleciona tudo
/STAT,GLOBAL ! Exibe o status da análise, com quantidade de nós, elementos, materiais, condições de contorno, etc.
NLIST,ALL, , ,XYZ,NODE,NODE,NODE ! Exibe a lista dos nós com coordenadas
ELIST,ALL,,,0,0 ! Exibe a lista dos elementos e seus nós
ACEL, 0, 0, -9.81

!SOLU_PP
/SOLU
ANTYPE, 0
j=1
!Resolver o modelo para cada condição de carga
*DO, I, 1, 3
    !Gravidade
    ! Calcular o ângulo em radianos
    Rad = (j-1)*45*3.14159265359
    Rad=Rad/180
    f=1000000
    ! Calcular as componentes da força horizontal
    FX = COS(Rad)*f
    FY = SIN(Rad)*f

    ! Aplicar as forças horizontais no nó 72
    ALLSEL, ALL
    F, 1001, FX, FX
    F, 1001, FY, FY

    ! Resolver o modelo
    SOLVE

    ! Salvar os resultados da solução
    SAVE, 'load_step_', j
    j=j+1
*ENDDO

!POST-PROCESSING
/POST1

! Definição dos Load Cases
LCDEF,1,1,1  ! Load case 1 aponta para o load step 1
LCDEF,2,2,1  ! Load case 2 aponta para o load step 2
LCDEF,3,3,1  ! Load case 3 aponta para o load step 3


LCASE,1
ESEL, S, TYPE, , 1  ! Seleciona apenas elementos do tipo 1 (BEAM188)
! Gerar ETABLE para momentos fletores My e Mz dos elementos selecionados
ETABLE, Fx_MAX, SMISC, 1, MAX  ! Força Axial máxima
ETABLE, My_MAX, SMISC, 2, MAX  ! Momento fletor máximo em Y
ETABLE, Mz_MAX, SMISC, 3, MAX  ! Momento fletor máximo em Z
ETABLE, Area, SMISC, 13  ! Área da seção transversal
! Exibir os resultados do ETABLE para momentos fletores, força axial e área
PRETAB, Fx_MAX, My_MAX, Mz_MAX

LCASE,2
ESEL, S, TYPE, , 1  ! Seleciona apenas elementos do tipo 1 (BEAM188)
! Gerar ETABLE para momentos fletores My e Mz dos elementos selecionados
ETABLE, Fx_MAX, SMISC, 1, MAX  ! Força Axial máxima
ETABLE, My_MAX, SMISC, 2, MAX  ! Momento fletor máximo em Y
ETABLE, Mz_MAX, SMISC, 3, MAX  ! Momento fletor máximo em Z
ETABLE, Area, SMISC, 13  ! Área da seção transversal
! Exibir os resultados do ETABLE para momentos fletores, força axial e área
PRETAB, Fx_MAX, My_MAX, Mz_MAX

LCASE,3
ESEL, S, TYPE, , 1  ! Seleciona apenas elementos do tipo 1 (BEAM188)
! Gerar ETABLE para momentos fletores My e Mz dos elementos selecionados
ETABLE, Fx_MAX, SMISC, 1, MAX  ! Força Axial máxima
ETABLE, My_MAX, SMISC, 2, MAX  ! Momento fletor máximo em Y
ETABLE, Mz_MAX, SMISC, 3, MAX  ! Momento fletor máximo em Z
ETABLE, Area, SMISC, 13  ! Área da seção transversal
! Exibir os resultados do ETABLE para momentos fletores, força axial e área
PRETAB, Fx_MAX, My_MAX, Mz_MAX

! Carregar e Comparar os Load Cases
LCASE,1  ! Carrega o Load Case 1 na memória
LCOPER,ABMX,2  ! Compara e armazena o valor máximo absoluto entre Load Case 1 e Load Case 2 na memória
LCWRITE,66  ! Escreve o resultado no arquivo Jobname.L12

LCASE,3  ! Carrega o Load Case 3 na memória
LCOPER,ABMX,67  ! Compara e armazena o valor máximo absoluto entre Load Case 3 e o resultado armazenado no arquivo Jobname.L12

! Definir os Load Cases para Resultados Estáticos
LCDEF,STAT

LCASE,67
ESEL, S, TYPE, , 1  ! Seleciona apenas elementos do tipo 1 (BEAM188)
! Gerar ETABLE para momentos fletores My e Mz dos elementos selecionados
ETABLE, Fx_MAX, SMISC, 1, MAX  ! Força Axial máxima
ETABLE, My_MAX, SMISC, 2, MAX  ! Momento fletor máximo em Y
ETABLE, Mz_MAX, SMISC, 3, MAX  ! Momento fletor máximo em Z

! Carregar e Comparar os Load Cases
LCASE,1  ! Carrega o Load Case 1 na memória
LCOPER,ABMN,2  ! Compara e armazena o valor máximo absoluto entre Load Case 1 e Load Case 2 na memória
LCWRITE,68  ! Escreve o resultado no arquivo Jobname.L12

LCASE,3  ! Carrega o Load Case 3 na memória
LCOPER,ABMN,69  ! Compara e armazena o valor máximo absoluto entre Load Case 3 e o resultado armazenado no arquivo Jobname.L12

! Definir os Load Cases para Resultados Estáticos
LCDEF,STAT

LCASE,69
ESEL, S, TYPE, , 1  ! Seleciona apenas elementos do tipo 1 (BEAM188)
ETABLE, Fx_MIN, SMISC, 1, MIN  ! Força Axial mínima
ETABLE, My_MIN, SMISC, 2, MIN  ! Momento fletor mínimo em Y
ETABLE, Mz_MIN, SMISC, 3, MIN  ! Momento fletor mínimo em Z
ETABLE, Area, SMISC, 13  ! Área da seção transversal

! Exibir os resultados do ETABLE para momentos fletores, força axial e área
PRETAB, Fx_MAX, My_MAX, Mz_MAX, Fx_MIN, My_MIN, Mz_MIN, Area

!FUNCIONANDO A CIMA


!POST-PROCESSING
/POST1
! Definição dos Load Cases para N = 3
*DO,i,1,3
   LCDEF,i,i,1  ! Define o Load Case i apontando para o Load Step i
*ENDDO

! Carregar o Primeiro Load Case e Comparar com os Demais
LCASE,1  ! Carrega o Load Case 1 na memória

*DO,R,2,3
   LCOPER,MAX,R  ! Compara o Load Case na memória com o próximo Load Case (2 e depois 3) e armazena o resultado na memória
   LCWRITE,50+R  ! Escreve o resultado em um arquivo cujo número não excede 99
*ENDDO
LCASE,53

! Gerar ETABLE para momentos fletores My e Mz dos elementos selecionados
ETABLE, Fx_MAX, SMISC, 1, MAX  ! Força Axial máxima
ETABLE, My_MAX, SMISC, 2, MAX  ! Momento fletor máximo em Y
ETABLE, Mz_MAX, SMISC, 3, MAX  ! Momento fletor máximo em Z

! Carregar o Primeiro Load Case e Comparar com os Demais
LCASE,1  ! Carrega o Load Case 1 na memória

*DO,R,2,3
   LCOPER,MIN,R  ! Compara o Load Case na memória com o próximo Load Case (2 e depois 3) e armazena o resultado na memória
   LCWRITE,60+R  ! Escreve o resultado em um arquivo cujo número não excede 99
*ENDDO
LCASE,63

ETABLE, Fx_MIN, SMISC, 1, MIN  ! Força Axial mínima
ETABLE, My_MIN, SMISC, 2, MIN  ! Momento fletor mínimo em Y
ETABLE, Mz_MIN, SMISC, 3, MIN  ! Momento fletor mínimo em Z
ETABLE, Area, SMISC, 13  ! Área da seção transversal

! Exibir os resultados do ETABLE para momentos fletores, força axial e área
PRETAB, Fx_MAX, Fx_MIN, My_MAX, My_MIN, Mz_MAX, Mz_MIN, Area

!FUNCIONANDO A CIMA


! Carregar o Primeiro Load Case e Comparar com os Demais
LCASE,1  ! Carrega o Load Case 1 na memória

*DO,i,2,3
   LCOPER,ABMX,i  ! Compara o Load Case 1 com o próximo Load Case (2 e depois 3) e armazena o resultado na memória
   LCWRITE,47+i  ! Escreve o resultado no arquivo Jobname.L100+i
*ENDDO

! Definir os Load Cases para Resultados Estáticos
LCDEF,STAT

LCASE,60

! Gerar ETABLE para momentos fletores My e Mz dos elementos selecionados
ETABLE, Fx_MAX, SMISC, 1, MAX  ! Força Axial máxima
ETABLE, My_MAX, SMISC, 2, MAX  ! Momento fletor máximo em Y
ETABLE, Mz_MAX, SMISC, 3, MAX  ! Momento fletor máximo em Z
ETABLE, Fx_MIN, SMISC, 1, MIN  ! Força Axial mínima
ETABLE, My_MIN, SMISC, 2, MIN  ! Momento fletor mínimo em Y
ETABLE, Mz_MIN, SMISC, 3, MIN  ! Momento fletor mínimo em Z
ETABLE, Area, SMISC, 13  ! Área da seção transversal

! Exibir os resultados do ETABLE para momentos fletores, força axial e área
PRETAB, Fx_MAX, My_MAX, Mz_MAX, Fx_MIN, My_MIN, Mz_MIN, Area


*DO, I, 1, 13  ! Loop para cada load step (1 a 13)
    SET, I  ! Definir o load step atual

    ! Selecionar os nós de 1 até k+10 (defina k conforme necessário)
    NSEL, S, NODE, , 1, k+10  ! Seleciona nós

    ! Exibir os resultados do ETABLE para deslocamentos
    PRNSOL, U, COMP  ! Imprimir deslocamentos

    *DO,i,1,10  ! Loop de 1 a 10 para 10 estacas
        elem1 = 1 + 39*(i-1)  ! Calcula o primeiro elemento para a estaca i
        elem2 = 1 + 40*i  ! Calcula o segundo elemento para a estaca i

        ESEL,A,ELEM,,elem1  ! Adiciona o elemento 1 + 39*i à seleção
        ESEL,A,ELEM,,elem2  ! Adiciona o elemento 40 + 39*i à seleção
    *ENDDO

    ! Gerar ETABLE para momentos fletores My e Mz dos elementos selecionados
    ETABLE, Fx_MAX, SMISC, 1, MAX  ! Força Axial
    ETABLE, My_MAX, SMISC, 2, MAX  ! Momento fletor em Y
    ETABLE, Mz_MAX, SMISC, 3, MAX  ! Momento fletor em Z
    ETABLE, Fx_MIN, SMISC, 1, MIN  ! Força Axial (mínimo)
    ETABLE, My_MIN, SMISC, 2, MIN  ! Momento fletor em Y (mínimo)
    ETABLE, Mz_MIN, SMISC, 3, MIN  ! Momento fletor em Z (mínimo)
    ETABLE, Area, SMISC, 13  ! Área da seção transversal

    ! Exibir os resultados do ETABLE para momentos fletores e área
    PRETAB, Fx_MAX, My_MAX, Mz_MAX, Fx_MIN, My_MIN, Mz_MIN, Area
*ENDDO

FINISH
